<?xml version="1.0"?>
<?xml-stylesheet href="http://jsbsim.sourceforge.net/JSBSim.xsl" type="text/xsl"?>
<fdm_config name="PBY-6" version="2.0" release="BETA"
 xmlns:xsi="http://www.w3.org/2001/XMLSchema-instance"
 xsi:noNamespaceSchemaLocation="http://jsbsim.sourceforge.net/JSBSim.xsd">

    <fileheader>
        <author> Aeromatic, Gerard Robin, Ron Jensen (engine and propeller) </author>
        <filecreationdate> 10-08-2008 </filecreationdate>
        <version> 0.4 </version>
        <description> Models a PBY-5 and 6 </description>
        <documentation>
            Technical data on the Consolidated PBY-5A
Powerplant  2 × Pratt  Whitney R-1830-92 Twin Wasp turbosupercharged radials, rated at 1200 hp (894.59 kW) each   Role during war
  U-boat Destroyer
Maritime/Coastal patrol reconnaissance Bomber
Transport
Sea-Air rescue Aircraft
  Length  63 ft 10.5 inch   Height  20 ft 2 inch
  Empty weight  17526 lb  '(7950 kg) Operational weight  34000 lb max
  Wing Span  104 ft 0 inch   Wing Aspect ratio  7.76
  Wing Area  1400 sq ft  (130 sq m) Service ceiling  14700 ft
  (61 kg / m2 )
  Maximum speed  179 mph at 7000 ft
  at  23000 lb  207 knt ias
  at  34000 lb 143  knt ias
  Stalling at 26000 lb 58-60 kias  at 34000 lb 66-70 kias
  Cruising speed  107 mph at optimum altitude
  speed for max climb 85 knot to 6000 ft
  Initial climb rate  Climb to 10,000 ft in 19 min 18 sec  Range  2545 miles max
  Fuel capacity internal  1,457 Imp gal (1,750 US gal)  Fuel capacity external  -
  Machine guns
  2 × 0.3 inch trainable forward-firing in nose turret
1 × 0.3 inch trainable rearward-firing in ventral tunnel
2 × 0.50 inch trainable guns, 1 in each "blister" beam positions
  Cannons  -
  Bomb load  up to 4,500 lb on four hardpoint: the 2 innerpoints each rated at 2,500 lb, the 2 outer points rated at 1,000 lb each. General load consists of:
4 × 1,000 lb or 500 lb bombs, or
12 × 100 lb bombs, or
4 × 650 lb, 450 lb, or 325 lb depth charges
  Torpedoes/rockets  In stead of bomb load 2 × 2,167 lb Mk 13-2 torpedoes
  Crew  9: pilot, co-pilot, navigator, radio/radar operator, flight engineer, bombardier/gunner, 3 gunners  Naval or ground based  Ground and Naval
  First flight (prototype)  20 March 1935  Operational Service  October 1936 - June 1982
  Manufacturer  Consolidated Aircraft Company  Number produced  3290 total, 803 this version
  Metric system
Length  19.47 m   Height  6.15 m
  Empty weight  7950 kg  Operational weight  15422 kg max
  Wing Span  31.7 m   Wing Aspect ratio  7.76
  Wing Area  130.06 m²  Service ceiling  4481 m
  Maximum speed  288 km/h at 2134 m  Cruising speed  172 km/h at optimum altitude
  Initial climb rate  Climb to 3050 m in 19 min 18 sec  Range  4096 km max
  Fuel capacity internal  6624 liters  Fuel capacity external  -
  Machine guns
  2 × 7.62 mm trainable forward-firing in nose turret
1 × 7.62 mm trainable rearward-firing in ventral tunnel
2 × 12.7 mm trainable guns, 1 in each "blister" beam positions
  Cannons  -
  Bomb load  up to 2041 kg on four hardpoint: the 2 innerpoints each rated at 1134 kg, the 2 outer points rated at 454 kg each. General load consists of:
4 × 454 kg or 227 kg bombs, or
12 × 45 kg bombs, or
4 × 295 kg, 294 kg, or 147 kg depth charges
Consolidated PBY-5A Catalina  This version was the first to become amphibian (with weels) with a retactable tricycle landing gear. Apart from that did the 5A receive some armor protection for the crew, and was the single 0.30 inch (7.62 mm) gun in the nose replaced by a double 0.30 inch (7.62 mm) gun
Number built: 803


Airfoil NACA0021

        </documentation>
    </fileheader>

    <metrics>
        <wingarea unit="FT2"> 1400 </wingarea>
        <wingspan unit="FT"> 104 </wingspan>
        <wing_incidence>          0.00 </wing_incidence> <!--6 deg included with the lift and drag-->
        <chord unit="FT"> 14.83 </chord>
        <htailarea unit="FT2"> 215 </htailarea>
        <htailarm unit="FT"> 38.2 </htailarm>
        <vtailarea unit="FT2"> 160 </vtailarea>
        <vtailarm unit="FT"> 38.2</vtailarm>
        <location name="AERORP" unit="IN">
            <x>3.866 </x>
            <y> 0 </y>
            <z> 81.851181</z>
        </location>
        <location name="EYEPOINT" unit="IN">
            <x> -153 </x>
            <y> -30 </y>
            <z> 40 </z>
        </location>
        <location name="VRP" unit="IN">
            <x> 0 </x>
            <y> 0 </y>
            <z> 0 </z>
        </location>
    </metrics>

    <mass_balance>
        <ixx unit="SLUG*FT2"> 278850 </ixx>
        <iyy unit="SLUG*FT2"> 237165 </iyy>
        <izz unit="SLUG*FT2"> 609302 </izz>
        <ixy unit="SLUG*FT2"> 0 </ixy>
        <ixz unit="SLUG*FT2"> 0 </ixz>
        <iyz unit="SLUG*FT2"> 0 </iyz>
        <emptywt unit="LBS"> 17526</emptywt>
        <location name="CG" unit="IN">
            <x> 2 </x>
            <y> 0 </y>
            <z> 11 </z>
        </location>
        <pointmass name="Watertank">
            <weight unit="LBS">000</weight>
            <location unit="IN">
                <x> -47 </x>
                <y> 0 </y>
                <z> -59 </z>
            </location>
        </pointmass>
    </mass_balance>

    <ground_reactions>

        <contact type="BOGEY" name="NOSE_LG"><!--0-->
            <location unit="IN">
                <x> -181.08622 </x>
                <y> 0 </y>
                <z> -94.561811</z>
            </location>
            <static_friction> 0.8 </static_friction>
            <dynamic_friction> 0.5 </dynamic_friction>
            <rolling_friction> 0.02 </rolling_friction>
            <spring_coeff unit="LBS/FT"> 34000 </spring_coeff>
            <damping_coeff unit="LBS/FT/SEC"> 7000 </damping_coeff>
            <max_steer unit="DEG"> 50 </max_steer>
            <brake_group> NONE </brake_group>
            <retractable>1</retractable>
        </contact>
        <contact type="BOGEY" name="LEFT_MLG"><!--1-->
            <location unit="IN">
                <x> 17.372402 </x>
                <y> -98.225591 </y>
                <z>-97.383071</z>
            </location>
            <static_friction> 0.8 </static_friction>
            <dynamic_friction> 0.5 </dynamic_friction>
            <rolling_friction> 0.02 </rolling_friction>
            <spring_coeff unit="LBS/FT"> 35420 </spring_coeff>
            <damping_coeff unit="LBS/FT/SEC"> 7084 </damping_coeff>
            <max_steer unit="DEG"> 0.0 </max_steer>
            <brake_group> LEFT </brake_group>
            <retractable>1</retractable>
        </contact>
        <contact type="BOGEY" name="RIGHT_MLG"><!--2-->
            <location unit="IN">
                <x> 17.372402</x>
                <y> 98.225591 </y>
                <z> -97.383071 </z>
            </location>
            <static_friction> 0.8 </static_friction>
            <dynamic_friction> 0.5 </dynamic_friction>
            <rolling_friction> 0.02 </rolling_friction>
            <spring_coeff unit="LBS/FT"> 35420 </spring_coeff>
            <damping_coeff unit="LBS/FT/SEC"> 7084 </damping_coeff>
            <max_steer unit="DEG"> 0.0 </max_steer>
            <brake_group> RIGHT </brake_group>
            <retractable>1</retractable>
        </contact>
        <contact type="BOGEY" name="AR-CAREN-ANCHOR"><!--3-->
            <location unit="IN">
                <x> 200 </x>
                <y> 0 </y>
                <z> -39 </z>
            </location>
            <static_friction> 0.4</static_friction>
            <dynamic_friction> 0.0 </dynamic_friction>
            <rolling_friction> 0.01 </rolling_friction>
            <side unit="FT/SEC">0.1</side>
            <spring_coeff unit="LBS/FT"> 24000 </spring_coeff>
            <damping_coeff unit="LBS/FT/SEC"> 5000 </damping_coeff>
            <relaxation_velocity>
              <rolling unit="FT/SEC">0.0</rolling>
              <side unit="FT/SEC">0.0</side>
            </relaxation_velocity>
            <force_lag_filter>
              <rolling> 0</rolling>
              <side>0</side>
            </force_lag_filter>
            <wheel_slip_filter>120</wheel_slip_filter>
            <max_steer unit="DEG"> 0.0 </max_steer>
            <brake_group>CENTER</brake_group>
            <retractable>0</retractable>
        </contact>
        <contact type="BOGEY" name="AV-CAREN"><!--4-->
            <location unit="IN">
                <x> -240</x>
                <y> 0 </y>
                <z> -29 </z>
            </location>
            <static_friction> 0.0 </static_friction>
            <dynamic_friction> 0.5 </dynamic_friction>
            <rolling_friction> 0.05</rolling_friction>
            <spring_coeff unit="LBS/FT"> 24000 </spring_coeff>
            <damping_coeff unit="LBS/FT/SEC"> 5000 </damping_coeff>
            <relaxation_velocity>
              <rolling unit="FT/SEC">0.0</rolling>
              <side unit="FT/SEC">0.0</side>
            </relaxation_velocity>
            <force_lag_filter>
              <rolling> 0</rolling>
              <side>0</side>
            </force_lag_filter>
            <wheel_slip_filter> 0</wheel_slip_filter>
            <max_steer unit="DEG"> 0.0 </max_steer>
            <brake_group> NONE </brake_group>
            <retractable>0</retractable>
        </contact>
        <contact type="BOGEY" name="CED-CAREN"><!--5-->
            <location unit="IN">
                <x> -57.35 </x>
                <y> 53 </y>
                <z> -45.1 </z>
            </location>
            <static_friction> 0 </static_friction>
            <dynamic_friction> 0 </dynamic_friction>
            <rolling_friction> 0.01 </rolling_friction>
            <spring_coeff unit="LBS/FT"> 47200 </spring_coeff>
            <damping_coeff unit="LBS/FT/SEC"> 2500 </damping_coeff>
            <relaxation_velocity>
              <rolling unit="FT/SEC">0.0</rolling>
              <side unit="FT/SEC">0.0</side>
            </relaxation_velocity>
            <max_steer unit="DEG"> 0.0 </max_steer>
            <brake_group> CENTER</brake_group>
            <retractable>0</retractable>
        </contact>
        <contact type="BOGEY" name="CEG-CAREN"><!--6-->
            <location unit="IN">
                <x> -57.35 </x>
                <y> -53 </y>
                <z> -45.1 </z>
            </location>
            <static_friction> 0 </static_friction>
            <dynamic_friction> 0 </dynamic_friction>
            <rolling_friction> 0.01 </rolling_friction>
            <spring_coeff unit="LBS/FT"> 47200 </spring_coeff>
            <damping_coeff unit="LBS/FT/SEC"> 2500 </damping_coeff>
            <relaxation_velocity>
              <rolling unit="FT/SEC">0.0</rolling>
              <side unit="FT/SEC">0.0</side>
            </relaxation_velocity>
            <max_steer unit="DEG"> 0.0 </max_steer>
            <brake_group> CENTER</brake_group>
            <retractable>0</retractable>
        </contact>
        <contact type="BOGEY" name="D-FLOT"><!--7-->
            <location unit="IN">
                <x> 0 </x>
                <y> 538 </y>
                <z> -14.20 </z>
            </location>
            <static_friction> 0.0 </static_friction>
            <dynamic_friction> 0.0 </dynamic_friction>
            <rolling_friction> 0.01 </rolling_friction>
            <spring_coeff unit="LBS/FT"> 11000 </spring_coeff>
            <damping_coeff unit="LBS/FT/SEC"> 500 </damping_coeff>
            <max_steer unit="DEG"> 0.0 </max_steer>
            <brake_group> NONE </brake_group>
            <retractable>1</retractable>
        </contact>
        <contact type="BOGEY" name="G-FLOT"><!--8-->
            <location unit="IN">
                <x> 0 </x>
                <y> -538 </y>
                <z> -14.20</z>
            </location>
            <static_friction> 0.0 </static_friction>
            <dynamic_friction> 0.0 </dynamic_friction>
            <rolling_friction> 0.01 </rolling_friction>
            <spring_coeff unit="LBS/FT"> 11000 </spring_coeff>
            <damping_coeff unit="LBS/FT/SEC"> 500 </damping_coeff>
            <max_steer unit="DEG"> 0.0 </max_steer>
            <brake_group> NONE</brake_group>
            <retractable>1</retractable>
        </contact>
        <contact type="BOGEY" name="WATER-INTAKE"><!--9-->
            <location unit="IN">
                <x> 45.739764 </x>
                <y> 0 </y>
                <z> -72.083071</z>
            </location>
            <static_friction> 0.00 </static_friction>
            <dynamic_friction> 0.00 </dynamic_friction>
            <rolling_friction> 0.00 </rolling_friction>
            <spring_coeff unit="LBS/FT"> 100 </spring_coeff>
            <damping_coeff unit="LBS/FT/SEC"> 20 </damping_coeff>
            <max_steer unit="DEG"> 0.0 </max_steer>
            <brake_group> NONE</brake_group>
            <retractable>0</retractable>
        </contact>
        <contact type="BOGEY" name="DCAREN-SENSOR"><!--10-->
            <location unit="IN">
                <x> -27.467717 </x>
                <y>53</y>
                <z>-62</z>
            </location>
            <static_friction> 0.00 </static_friction>
            <dynamic_friction> 0.00 </dynamic_friction>
            <rolling_friction> 0.00 </rolling_friction>
            <spring_coeff unit="LBS/FT"> 100 </spring_coeff>
            <damping_coeff unit="LBS/FT/SEC"> 20 </damping_coeff>
            <max_steer unit="DEG"> 0.0 </max_steer>
            <brake_group> NONE</brake_group>
            <retractable>0</retractable>
        </contact>
        <contact type="BOGEY" name="GCAREN-SENSOR"><!--11-->
            <location unit="IN">
                <x> -27.467717 </x>
                <y>-53</y>
                <z>-62</z>
            </location>
            <static_friction> 0.00 </static_friction>
            <dynamic_friction> 0.00 </dynamic_friction>
            <rolling_friction> 0.00 </rolling_friction>
            <spring_coeff unit="LBS/FT"> 100 </spring_coeff>
            <damping_coeff unit="LBS/FT/SEC"> 20 </damping_coeff>
            <max_steer unit="DEG"> 0.0 </max_steer>
            <brake_group> NONE</brake_group>
            <retractable>0</retractable>
        </contact>
        <contact type="STRUCTURE" name="D-AILE">
            <location unit="IN">
                <x> 0 </x>
                <y>627</y>
                <z> 87.6</z>
            </location>
            <static_friction> 0 </static_friction>
            <dynamic_friction> 0.5 </dynamic_friction>
            <spring_coeff unit="LBS/FT"> 1000 </spring_coeff>
            <damping_coeff unit="LBS/FT/SEC"> 500 </damping_coeff>
        </contact>
        <contact type="STRUCTURE" name="G-AILE">
            <location unit="IN">
                <x> 0 </x>
                <y> -627</y>
                <z> 87.6 </z>
            </location>
            <static_friction> 0 </static_friction>
            <dynamic_friction> 0.5 </dynamic_friction>
            <spring_coeff unit="LBS/FT"> 1000 </spring_coeff>
            <damping_coeff unit="LBS/FT/SEC"> 500 </damping_coeff>
        </contact>
        <contact type="STRUCTURE" name="AR-QUEUE">
            <location unit="IN">
                <x> 537 </x>
                <y> 0 </y>
                <z> 26 </z>
            </location>
            <static_friction> 0 </static_friction>
            <dynamic_friction> 0.5 </dynamic_friction>
            <spring_coeff unit="LBS/FT"> 1000 </spring_coeff>
            <damping_coeff unit="LBS/FT/SEC"> 500 </damping_coeff>
        </contact>
    </ground_reactions>
    <propulsion>
        <engine file="PBY-5_engine-new">
            <location unit="IN">
                <x> -100 </x>
                <y> -83.62 </y>
                <z> 84.1 </z>
            </location>
            <orient unit="DEG">
                <roll> 0.0 </roll>
                <pitch> 3 </pitch>
                <yaw> 0 </yaw>
            </orient>
            <feed>0</feed>
            <feed>1</feed>
            <feed>2</feed>
	    <thruster file="PBY-5_prop-new">
                <location unit="IN">
                    <x> -118 </x>
                    <y> -83.62 </y>
                    <z> 84.1 </z>
                </location>
                <orient unit="DEG">
                    <roll> 0.0 </roll>
                    <pitch> 3.0 </pitch>
                    <yaw> 0.0 </yaw>
                </orient>
                <sense> 1 </sense>
                <p_factor> 60</p_factor>
            </thruster>
        </engine>
	<engine file="PBY-5_engine-new">
            <location unit="IN">
                <x> -100 </x>
                <y> 83.62 </y>
                <z> 84.1 </z>
            </location>
            <orient unit="DEG">
                <roll> 0.0 </roll>
                <pitch> 3 </pitch>
                <yaw> 0 </yaw>
            </orient>
            <feed>0</feed>
            <feed>3</feed>
            <feed>4</feed>
	    <thruster file="PBY-5_prop-new">
                <location unit="IN">
                    <x> -118 </x>
                    <y> 83.62 </y>
                    <z> 84.1 </z>
                </location>
                <orient unit="DEG">
                    <roll> 0.0 </roll>
                    <pitch> 3.0 </pitch>
                    <yaw> 0.0 </yaw>
                </orient>
                <sense> 1 </sense>
                <p_factor> 60</p_factor>
            </thruster>
        </engine>
        <tank type="FUEL">    <!-- Tank number 0 -->
            <location unit="IN">
                <x> 0 </x>
                <y> 0 </y>
                <z> 64.85</z>
            </location>
            <capacity unit="LBS"> 1 </capacity>
            <contents unit="LBS"> 0 </contents>
        </tank>
        <tank type="FUEL">    <!-- Tank number 1 -->
            <location unit="IN">
                <x> 0 </x>
                <y> 0 </y>
                <z> 64.85 </z>
            </location>
            <capacity unit="LBS"> 3000 </capacity>
            <contents unit="LBS"> 1000 </contents>
        </tank>
        <tank type="FUEL">    <!-- Tank number 2 -->
            <location unit="IN">
                <x> 0 </x>
                <y> 0 </y>
                <z> 64.85 </z>
            </location>
            <capacity unit="LBS"> 3000 </capacity>
            <contents unit="LBS"> 1000 </contents>
        </tank>
        <tank type="FUEL">    <!-- Tank number 3 -->
            <location unit="IN">
                <x> 0 </x>
                <y> 0 </y>
                <z> 64.85 </z>
            </location>
            <capacity unit="LBS"> 3000</capacity>
            <contents unit="LBS"> 1000 </contents>
        </tank>

         <tank type="FUEL">    <!-- Tank number 4 -->
            <location unit="IN">
                <x> 0 </x>
                <y> 0 </y>
                <z> 64.85 </z>
            </location>
            <capacity unit="LBS"> 3000</capacity>
            <contents unit="LBS"> 1000 </contents>
        </tank>

    </propulsion>

    <system file="landing-gear"/>
    <!--<system file="propulsion"/>-->
    <system file="electrical"/>
    <system file="water-bomb"/>
    <system file="floats"/>
    <system file="on-water-control"/>
    <system file="hull"/>
    <system file="mixture-control"/>
    <system file="propulsion"/>

    <flight_control name="FCS: PBY-6">

        <channel name="Pitch">

            <summer name="Pitch Trim Sum">
                <input>fcs/elevator-cmd-norm</input>
                <input>fcs/pitch-trim-cmd-norm</input>
                <clipto>
                    <min>-1</min>
                    <max>1</max>
                </clipto>
            </summer>

            <aerosurface_scale name="Elevator Control">
                <input>fcs/pitch-trim-sum</input>
                <range>
                    <min>-0.35</min>
                    <max>0.3</max>
                </range>
                <output>fcs/elevator-pos-rad</output>
            </aerosurface_scale>
            <aerosurface_scale name="elevator normalization">
                    <input>fcs/elevator-pos-rad</input>
                    <domain>
                            <min> -0.35 </min>
                            <max>  0.35 </max>
                    </domain>
                    <range>
                            <min> -1 </min>
                            <max>  1 </max>
                    </range>
                    <output>fcs/elevator-pos-norm</output>
            </aerosurface_scale>

        </channel>
        <channel name="Roll">
            <summer name="Roll Trim Sum">

                <input>fcs/aileron-cmd-norm</input>
                <input>fcs/roll-trim-cmd-norm</input>
                <clipto>
                    <min>-1</min>
                    <max>1</max>
                </clipto>
            </summer>

            <aerosurface_scale name="Left Aileron Control">
                <input>fcs/roll-trim-sum</input>
                <range>
                    <min>-0.35</min>
                    <max>0.35</max>
                </range>
                <output>fcs/left-aileron-pos-rad</output>
            </aerosurface_scale>
            <aerosurface_scale name="Right Aileron Control">
                <input>-fcs/roll-trim-sum</input>
                <range>
                    <min>-0.35</min>
                    <max>0.35</max>
                </range>
                <output>fcs/right-aileron-pos-rad</output>
            </aerosurface_scale>

            <aerosurface_scale name="left aileron normalization">
                    <input>fcs/left-aileron-pos-rad</input>
                    <domain>
                            <min> -0.35 </min>
                            <max>  0.35 </max>
                    </domain>
                    <range>
                            <min> -1 </min>
                            <max>  1 </max>
                    </range>
                    <output>fcs/left-aileron-pos-norm</output>
            </aerosurface_scale>
            <aerosurface_scale name="right aileron normalization">
                    <input>fcs/right-aileron-pos-rad</input>
                    <domain>
                            <min> -0.35 </min>
                            <max>  0.35 </max>
                    </domain>
                    <range>
                            <min> -1 </min>
                            <max>  1 </max>
                    </range>
                    <output>fcs/right-aileron-pos-norm</output>
            </aerosurface_scale>


        </channel>
        <channel name="Yaw">
            <summer name="Rudder Command Sum">
                <input>fcs/rudder-cmd-norm</input>
                <input>fcs/yaw-trim-cmd-norm</input>
                <clipto>
                    <min>-1</min>
                    <max>1</max>
                </clipto>
            </summer>

            <aerosurface_scale name="Rudder Control">
                <input>fcs/rudder-command-sum</input>
                <range>
                    <min>-0.35</min>
                    <max>0.35</max>
                </range>
                <output>fcs/rudder-pos-rad</output>
            </aerosurface_scale>
            <aerosurface_scale name="rudder normalization">
                    <input>fcs/rudder-pos-rad</input>
                    <domain>
                            <min> -0.35 </min>
                            <max>  0.35 </max>
                    </domain>
                    <range>
                            <min> -1 </min>
                            <max>  1 </max>
                    </range>
                    <output>fcs/rudder-pos-norm</output>
            </aerosurface_scale>
        </channel>


    </flight_control>
    <aerodynamics>

       <!-- <alphalimits unit="RAD">
            <min>-0.5</min>
            <max>0.18</max>
        </alphalimits>

        <hysteresis_limits unit="RAD">
            <min> 0.1</min>
            <max> 0.18</max>
    </hysteresis_limits>-->


        <function name="aero/function/kCDhull">
            <description>Drag_Hull_factor</description>
            <product>
                <table>
                    <independentVar lookup="row">velocities/ve-kts</independentVar>
                    <independentVar lookup="column">position/h-agl-ft</independentVar>
                    <!--<independentVar lookup="table">aero/alpha-rad</independentVar>-->
                    <tableData>
                                         6.1   6.35
                        00.0000    0.0000    0.0000
                        04.7000    0.0678    0.0339
                        07.5000    0.1356    0.0678
                        10.4000    0.2288    0.1144
                        13.2000    0.3559    0.1780
                        15.6000    0.4576    0.2288
                        17.9000    0.5593    0.2797
                        19.8000    0.6186    0.3093
                        23.1000    0.7203    0.3602
                        26.4000    0.8051    0.4026
                        30.7000    0.8983    0.4492
                        33.0000    0.9322    0.4661
                        35.8000    0.9576    0.4788
                        39.1000    0.9915    0.4958
                        42.0000    1.0000    0.5000
                        45.3000    0.9915    0.4958
                        48.6000    0.9961    0.4981
                        51.9000    0.9068    0.4534
                        56.1000    0.7119    0.3560
                        60.9000    0.6186    0.3093
                        65.6000    0.4915    0.2458
                        71.7000    0.1949    0.0975
                    </tableData>
                   <!-- <tableData  breakPoint="0.0698.">
                                            6.1   6.35
                        00.0000    0.0000    0.0000
                        04.7000    0.00678    0.00339
                        07.5000    0.01356    0.00678
                        10.4000    0.02288    0.01144
                        13.2000    0.03559    0.01780
                        15.6000    0.04576    0.02288
                        17.9000    0.05593    0.02797
                        19.8000    0.06186    0.03093
                        23.1000    0.07203    0.03602
                        26.4000    0.08051    0.04026
                        30.7000    0.08983    0.04492
                        33.0000    0.09322    0.04661
                        35.8000    0.09576    0.04788
                        39.1000    0.09915    0.04958
                        42.0000    0.10000    0.05000
                        45.3000    0.09915    0.04958
                        48.6000    0.09961    0.04981
                        51.9000    0.09068    0.04534
                        56.1000    0.07119    0.03560
                        60.9000    0.06186    0.03093
                        65.6000    0.04915    0.02458
                        71.7000    0.01949    0.00975
                    </tableData>-->
                </table>
            </product>
        </function>

        <function name="aero/function/kCDge">
            <description>Change_in_drag_due_to_ground_effect</description>
            <product>
                <table>
                    <independentVar>aero/h_b-mac-ft</independentVar>
                    <tableData>
                        0.0000    0.0480
                        0.1000    0.5150
                        0.1500    0.6290
                        0.2000    0.7090
                        0.3000    0.8150
                        1.1000    1.0000
                    </tableData>
                </table>
            </product>
        </function>

        <function name="aero/function/kCLge">
            <description>Change_in_lift_due_to_ground_effect</description>
            <product>
                <table>
                    <independentVar>aero/h_b-mac-ft</independentVar>
                    <tableData>
                        0.0000    1.2000
                        0.1000    1.1500
                        0.1500    1.0900
                        0.2000    1.0200
                        1.1000    1.0000
                    </tableData>
                </table>
            </product>
            </function>
        <!--<function name="aero/function/kCLHull">
            <description>Change_in_lift_due_to_hull</description>
            <product>
                <table>
                     <independentVar lookup="row">velocities/ve-kts</independentVar>
                    <independentVar lookup="column">position/h-agl-ft</independentVar>
                    <tableData>
                                         6.100    6.3000    7.0000    8.00
                        0.0000    1.0000    1.0000    1.0000     0
                        35.8000    1.100       1.0000   1.0000     0
                        45.3000    1.2000     1.1000   1.0000   0
                        48.6000    1.2000      1.1000  1.0000   0
                        51.9000    1.200       1.1000 1.0000    0
                        53.000      1.200    1.100    1.0000    0
                        63.0000    1.100    1.050    1.0000     0
                        100.0000   1.0000   1.000    1.0000     0
                    </tableData>
                </table>
            </product>
            </function>-->
        <function name="aero/function/kCmHull">
            <description>Pitch_Hull_factor</description>
            <product>
                <table>
                    <independentVar lookup="row">velocities/ve-kts</independentVar>
                    <independentVar lookup="column">position/h-agl-ft</independentVar>
                    <tableData>
                                        6.100    7.0000
                        0.0000    0.0000    0.0000
                        30.0000 0.0000  0.0000
                        33.5000    0.4186    0.1093
                        34.7000    0.8983    0.4492
                        35.8000    0.9576    0.4788
                        39.1000    0.9915    0.4958
                        42.0000    1.1000    0.5000
                        45.3000    1.1000    0.4958
                        48.6000    1.0000    0.4981
                        52.1000    0.8700    0.3560
                        60.000     0.4500    0.2458
                        100.0000    0.0000    0.000
                    </tableData>
                </table>
            </product>
            </function>
        <axis name="DRAG">
            <function name="aero/coefficient/CDterrain">
                <description>Drag_Terrain_factor</description>
                <product>
                    <property>fcs/drag-terrain-factor-switch</property>
                    <property>inertia/weight-lbs</property>
                        <value>5</value>
                </product>
            </function>
            <function name="aero/coefficient/CDhump">
                <description>Drag_at_hump</description>
                <product>
                    <property>aero/qbar-psf</property>
                    <property>metrics/Sw-sqft</property>
                    <property>aero/function/kCDhull</property>
                    <property>gear/unit[9]/WOW</property>
                      <table>
                          <independentVar>inertia/weight-lbs</independentVar>
                          <tableData>
                              42841.0000    0.2800
                              21252.0000    0.2100
                          </tableData>
                      </table>
                </product>
            </function>
            <function name="aero/coefficient/CDhumpAV">
                <description>Drag_at_hump_nose</description>
                <product>
                    <property>aero/qbar-psf</property>
                    <property>metrics/Sw-sqft</property>
                    <property>aero/function/kCDhull</property>
                    <property>gear/unit[4]/WOW</property>
                    <value>3.00</value>
                </product>
            </function>

            <function name="aero/coefficient/CDFloatLeft">
                <description>Drag_at_float</description>
                    <product>
                        <property>aero/qbar-psf</property>
                        <property>metrics/Sw-sqft</property>
                        <property>systems/float-left</property>
                        <value>0.0150</value>
                    </product>
            </function>
            <function name="aero/coefficient/CDFloatRight">
                <description>Drag_at_float</description>
                    <product>
                        <property>aero/qbar-psf</property>
                        <property>metrics/Sw-sqft</property>
                        <property>systems/float-right</property>
                        <value>0.0150</value>
                    </product>
            </function>

            <!--with incidence wing 6 deg-->
            <function name="aero/coefficient/CD0">
                <description>Drag_at_zero_lift</description>
                <product>
                    <property>aero/qbar-psf</property>
                    <property>metrics/Sw-sqft</property>
                    <property>aero/function/kCDge</property>
                      <table>
                          <independentVar>aero/alpha-rad</independentVar>
                          <tableData>
                              -1                0.8
                              -0.2793	0.0148
                              -0.2618	0.0137
                              -0.2443	0.0125
                              -0.2269	0.0108
                              -0.2094	0.0105
                              -0.1920	0.0098
                              -0.1745	0.0072
                              -0.1571	0.0059
                              -0.1396	0.0055
                              -0.1222	0.0069
                              -0.1047	0.0057
                              -0.0873	0.0070
                              -0.0698	0.0054
                              -0.0524	0.0059
                              -0.0349	0.0072
                              -0.0175	0.0098
                              0.0000	0.0105
                              0.0175	0.0107
                              0.0349	0.0125
                              0.0524	0.0136
                              0.0698	0.0148
                              0.0873	0.0163
                              0.1047	0.0182
                              0.1222	0.0200
                              0.1396	0.0226
                              0.1571	0.0251
                              0.1745	0.0283
                              0.1920	0.0318
                              0.2094	0.0362
                              0.2269	0.0416
                              0.2443	0.0484
                              0.2618	0.0559
                              0.2793	0.0655
                              0.2967	0.0761
                              0.3142	0.0881
                              0.3316	0.1009
                              0.3491	0.1152
                              0.3665	0.1308
                              0.3840	0.1499
                              0.4014	0.1684
                              0.4189	0.1877
                              1                 0.8
                          </tableData>
                      </table>
                </product>
            </function>
            <function name="aero/coefficient/CDi">
                <description>Induced_drag</description>
                <product>
                    <property>aero/qbar-psf</property>
                    <property>metrics/Sw-sqft</property>
                    <property>aero/cl-squared</property>
                    <value>0.0350</value>
                </product>
            </function>
            <function name="aero/coefficient/CDmach">
                <description>Drag_due_to_mach</description>
                <product>
                    <property>aero/qbar-psf</property>
                    <property>metrics/Sw-sqft</property>
                      <table>
                          <independentVar>velocities/mach</independentVar>
                          <tableData>
                              0.0000    0.0000
                              0.7900    0.0000
                              1.1000    0.0230
                              1.8000    0.0150
                          </tableData>
                      </table>
                </product>
            </function>
            <function name="aero/coefficient/CDgear">
                <description>Drag_due_to_gear</description>
                <product>
                    <property>aero/qbar-psf</property>
                    <property>metrics/Sw-sqft</property>
                    <property>fcs/gear-pos-norm</property>
                    <value>0.0150</value>
                </product>
            </function>

            <function name="aero/coefficient/CDgear_water">
                <description>Drag_due_to_gear_in_water</description>
                <product>
                    <property>fcs/drag-gear-in-water-switch</property>
                    <table>
                          <independentVar>velocities/vc-kts</independentVar>
                          <tableData>
                              0     0
                              10    1000
                              30    3000
                               50    9000
                              70   27000
                              90   51000
                              110  153000
                          </tableData>
                      </table>
                </product>
            </function>

            <function name="aero/coefficient/CDbeta">
                <description>Drag_due_to_sideslip</description>
                <product>
                    <property>aero/qbar-psf</property>
                    <property>metrics/Sw-sqft</property>
                      <table>
                          <independentVar>aero/beta-rad</independentVar>
                          <tableData>
                              -1.5700    1.2300
                              -0.2600    0.0500
                              0.0000    0.0000
                              0.2600    0.0500
                              1.5700    1.2300
                          </tableData>
                      </table>
                </product>
            </function>
            <function name="aero/coefficient/CDde">

                <description>Drag_due_to_Elevator_Deflection</description>
                <product>
                    <property>aero/qbar-psf</property>
                    <property>metrics/Sw-sqft</property>
                    <abs><property>fcs/elevator-pos-norm</property></abs>
                    <value>0.0590</value>
                </product>
            </function>
        </axis>

        <axis name="SIDE">
            <function name="aero/coefficient/CYb">
                <description>Side_force_due_to_beta</description>
                <product>
                    <property>aero/qbar-psf</property>
                    <property>metrics/Sw-sqft</property>
                    <property>aero/beta-rad</property>
                    <value>-1.0000</value>
                </product>
            </function>
        </axis>

        <axis name="LIFT">
            <!--FIXME that constant value is only estimated -->
           <!-- <function name="aero/coefficient/CLhull">
                <description>Lift_due_to_hull_on_water</description>
                <product>
                    <property>aero/qbar-psf</property>
                    <property>aero/function/kCLHull</property>
                    <value>2000</value>
                </product>
            </function>-->

            <!--with incidence wing 6 deg-->
            <function name="aero/coefficient/CLalpha">
                <description>Lift_due_to_alpha</description>
                <product>
                    <property>aero/qbar-psf</property>
                    <property>metrics/Sw-sqft</property>
                    <property>aero/function/kCLge</property>
                      <table>
                          <independentVar>aero/alpha-rad</independentVar>
                          <tableData>
                              -0.2793	-1.2300
                              -0.2618	-1.1170
                              -0.2443	-1.0000
                              -0.2269	-0.8810
                              -0.2094	-0.7590
                              -0.1920	-0.6350
                              -0.1745	-0.5100
                              -0.1571	-0.3830
                              -0.1396	-0.2560
                              -0.1222	-0.1280
                              -0.1047	0.0000
                              -0.0873	0.1280
                              -0.0698	0.2560
                              -0.0524	0.3830
                              -0.0349	0.5100
                              -0.0175	0.6350
                              0.0000	0.7590
                              0.0175	0.8810
                              0.0349	1.0000
                              0.0524	1.1170
                              0.0698	1.2300
                              0.0873	1.3380
                              0.1047	1.4390
                              0.1222	1.5320
                              0.1396	1.6160
                              0.1571	1.6910
                              0.1745	1.7560
                              0.1920	1.8090
                              0.2094	1.8520
                              0.2269	1.8830
                              0.2443	1.9040
                              0.2618	1.9100
                              0.2793	1.9020
                              0.2967	1.8850
                              0.3142	1.8600
                              0.3316	1.8300
                              0.3491	1.7950
                              0.3665	1.7550
                              0.3840	1.7140
                              0.4014	1.6680
                              0.4189	1.6200
                              1                 0.7
                          </tableData>
                      </table>
                </product>
            </function>
            <function name="aero/coefficient/CLde">
                <description>Lift_due_to_Elevator_Deflection</description>
                <product>
                    <property>aero/qbar-psf</property>
                    <property>metrics/Sw-sqft</property>
                    <property>fcs/elevator-pos-rad</property>
                    <value>0.2000</value>
                </product>
            </function>
        </axis>

        <axis name="ROLL">
            <function name="aero/coefficient/Clb">
                <description>Roll_moment_due_to_beta</description>
                <product>
                    <property>aero/qbar-psf</property>
                    <property>metrics/Sw-sqft</property>
                    <property>metrics/bw-ft</property>
                    <property>aero/beta-rad</property>
                    <value>-0.1000</value>
                </product>
            </function>
            <function name="aero/coefficient/Clp">
                <description>Roll_moment_due_to_roll_rate</description>
                <product>
                    <property>aero/qbar-psf</property>
                    <property>metrics/Sw-sqft</property>
                    <property>metrics/bw-ft</property>
                    <property>aero/bi2vel</property>
                    <property>velocities/p-aero-rad_sec</property>
                    <value>-0.4000</value>
                </product>
            </function>
            <function name="aero/coefficient/Clr">
                <description>Roll_moment_due_to_yaw_rate</description>
                <product>
                    <property>aero/qbar-psf</property>
                    <property>metrics/Sw-sqft</property>
                    <property>metrics/bw-ft</property>
                    <property>aero/bi2vel</property>
                    <property>velocities/r-aero-rad_sec</property>
                    <value>0.1500</value>
                </product>
            </function>
            <function name="aero/coefficient/Clda">
                <description>Roll_moment_due_to_aileron</description>
                <product>
                    <property>aero/qbar-psf</property>
                    <property>metrics/Sw-sqft</property>
                    <property>metrics/bw-ft</property>
                    <property>fcs/left-aileron-pos-rad</property>
                      <table>
                          <independentVar>velocities/mach</independentVar>
                          <tableData>
                              0.0000    0.1000
                              2.0000    0.0330
                          </tableData>
                      </table>
                </product>
            </function>
            <function name="aero/coefficient/Cldr">
                <description>Roll_moment_due_to_rudder</description>
                <product>
                    <property>aero/qbar-psf</property>
                    <property>metrics/Sw-sqft</property>
                    <property>metrics/bw-ft</property>
                    <property>fcs/rudder-pos-rad</property>
                    <value>0.0100</value>
                </product>
            </function>
        </axis>

        <axis name="PITCH">
            <function name="aero/coefficient/Cmalpha">
                <description>Pitch_moment_due_to_alpha</description>
                <product>
                    <property>aero/qbar-psf</property>
                    <property>metrics/Sw-sqft</property>
                    <property>metrics/cbarw-ft</property>
                    <property>aero/alpha-rad</property>
                    <value>-0.6000</value>
                </product>
            </function>
            <function name="aero/coefficient/Cmde">
                <description>Pitch_moment_due_to_elevator</description>
                <product>
                    <property>aero/qbar-psf</property>
                    <property>metrics/Sw-sqft</property>
                    <property>metrics/cbarw-ft</property>
                    <property>fcs/elevator-pos-rad</property>
                      <table>
                          <independentVar>velocities/mach</independentVar>
                          <tableData>
                              0.0000    -1.2000
                              2.0000    -0.3000
                          </tableData>
                      </table>
                </product>
            </function>
            <function name="aero/coefficient/Cmq">
                <description>Pitch_moment_due_to_pitch_rate</description>
                <product>
                    <property>aero/qbar-psf</property>
                    <property>metrics/Sw-sqft</property>
                    <property>metrics/cbarw-ft</property>
                    <property>aero/ci2vel</property>
                    <property>velocities/q-aero-rad_sec</property>
                    <value>-17.0000</value>
                </product>
            </function>
            <function name="aero/coefficient/Cmadot">
                <description>Pitch_moment_due_to_alpha_rate</description>
                <product>
                    <property>aero/qbar-psf</property>
                    <property>metrics/Sw-sqft</property>
                    <property>metrics/cbarw-ft</property>
                    <property>aero/ci2vel</property>
                    <property>aero/alphadot-rad_sec</property>
                    <value>-6.0000</value>
                </product>
            </function>

            <function name="aero/coefficient/CmHump">
                <description>Pitch_at_hump</description>
                <product>
                    <property>aero/qbar-psf</property>
                    <property>aero/function/kCmHull</property>
                    <property>gear/unit[5]/WOW</property>
                    <value>6000</value>
                </product>
            </function>


            <function name="aero/coefficient/CmHumpAV">
                <description>Pitch_at_hump_nose</description>
                <product>
                    <property>gear/unit[4]/WOW</property>
                    <property>inertia/weight-lbs</property>
                    <table>
                        <independentVar>velocities/vc-kts</independentVar>
                        <tableData>
                            0     0
                            30    0
                            50    -10
                            70   -70
                            90   -170
                            110  -270
                        </tableData>
                    </table>
                </product>
            </function>


            <function name="aero/coefficient/Cmgear_water">
                <description>Pitch_due_to_gear_in_water</description>
                <product>
                    <property>fcs/drag-gear-in-water-switch</property>
                    <property>inertia/weight-lbs</property>
                    <table>
                          <independentVar>velocities/vc-kts</independentVar>
                          <tableData>
                              0     0
                              30    0
                               50    -10
                              70   -30
                              90   -90
                              110  -270
                          </tableData>
                      </table>
                </product>
            </function>
        </axis>

        <axis name="YAW">
            <function name="aero/coefficient/Cnb">
                <description>Yaw_moment_due_to_beta</description>
                <product>
                    <property>aero/qbar-psf</property>
                    <property>metrics/Sw-sqft</property>
                    <property>metrics/bw-ft</property>
                    <property>aero/beta-rad</property>
                    <value>0.1200</value>
                </product>
            </function>
            <function name="aero/coefficient/Cnr">
                <description>Yaw_moment_due_to_yaw_rate</description>
                <product>
                    <property>aero/qbar-psf</property>
                    <property>metrics/Sw-sqft</property>
                    <property>metrics/bw-ft</property>
                    <property>aero/bi2vel</property>
                    <property>velocities/r-aero-rad_sec</property>
                    <value>-0.1500</value>
                </product>
            </function>
            <function name="aero/coefficient/Cndr">
                <description>Yaw_moment_due_to_rudder</description>
                <product>
                    <property>aero/qbar-psf</property>
                    <property>metrics/Sw-sqft</property>
                    <property>metrics/bw-ft</property>
                    <property>fcs/rudder-pos-rad</property>
                    <value>-0.1000</value>
                </product>
            </function>
            <function name="aero/coefficient/Cnda">
                <description>Adverse_yaw</description>
                <product>
                    <property>aero/qbar-psf</property>
                    <property>metrics/Sw-sqft</property>
                    <property>metrics/bw-ft</property>
                    <property>fcs/left-aileron-pos-rad</property>
                    <value>0.0000</value>
                </product>
            </function>
            <function name="aero/coefficient/CnFloatLeft">
                <description>Yaw_at_float_left</description>
                    <product>
                        <property>aero/qbar-psf</property>
                        <property>metrics/Sw-sqft</property>
                        <property>systems/float-left</property>
                        <value>-1.00</value>
                    </product>
            </function>
            <function name="aero/coefficient/CnFloatRight">
                <description>Yaw_at_float_right</description>
                    <product>
                        <property>aero/qbar-psf</property>
                        <property>metrics/Sw-sqft</property>
                        <property>systems/float-right</property>
                        <value>1.00</value>
                    </product>
            </function>
        </axis>
    </aerodynamics>

    <external_reactions>

        <force name="hull_r" frame="BODY">
            <location unit="IN">
                <x>-40 </x><!---1.23942-->
                <y> 54.714567 </y><!--1.38975-->
                <z> -49.962205 </z><!---1.26904-->
            </location>
            <direction>
                <x>0</x>
                <y>0</y>
                <z>-1</z>
            </direction>
        </force>
        <force name="hull_l" frame="BODY">
            <location unit="IN">
                <x>-40  </x><!---1.23942-->
                <y> -54.714567 </y><!---1.38975-->
                <z> -49.962205 </z><!---1.26904-->
            </location>
            <direction>
                <x>0</x>
                <y>0</y>
                <z>-1</z>
            </direction>
        </force>

        <force name="hull_arr" frame="BODY">
            <location unit="IN">
                <x>20  </x><!---1.23942-->
                <y> 52 </y><!---1.38975-->
                <z> -49.962205 </z><!---1.26904-->
            </location>
            <direction>
                <x>0</x>
                <y>0</y>
                <z>-1</z>
            </direction>
        </force>
        <force name="hull_arl" frame="BODY">
            <location unit="IN">
                <x>20  </x><!---1.23942-->
                <y> -52 </y><!---1.38975-->
                <z> -49.962205 </z><!---1.26904-->
            </location>
            <direction>
                <x>0</x>
                <y>0</y>
                <z>-1</z>
            </direction>
        </force>

        <force name="mooring" frame="BODY">
            <location unit="IN">
                <x>234 </x>
                <y>0 </y>
                <z> -49.962205 </z>
            </location>
            <direction>
                <x>-1</x>
                <y>0</y>
                <z>0</z>
            </direction>
        </force>


      <!--
        function_string = "function";
        description_string = "description";
        sum_string = "sum";
        difference_string = "difference";
        product_string = "product";
        quotient_string = "quotient";
        pow_string = "pow";
        exp_string = "exp";
        abs_string = "abs";
        sin_string = "sin";
        cos_string = "cos";
        tan_string = "tan";
        asin_string = "asin";
        acos_string = "acos";
        atan_string = "atan";
        atan2_string = "atan2";
        min_string = "min";
        max_string = "max";
        avg_string = "avg";
        fraction_string = "fraction";
        mod_string = "mod";
        random_string = "random";
        integer_string = "integer";
        -->

        </external_reactions>
</fdm_config>
